# A column of ulsph is placed in a container and allowed to collapse unter the
# influence of gravity. Several solid objects are also placed in the container.
# The ulsph flow pushes the solid objects around until the sytem comes to halt due to
# viscous damping. The solid objects have a lower mass density than ulsph and finally float on
# the ulsph surface.
#
# Water is modelled using the Updated Lagrangian formalism. Solid bodies are modelled using the
# Total Lagrangian formalism. Contact forces between container, solid bodies, and ulsph prevent
# mutual penetration of these physical entities.

variable        l0 equal 0.1 # initial particle lattice spacing
variable        rho_ulsph equal 1000 # mass density ulsph
variable        rho_obj equal 300 # mass density solid objects
variable        h equal 2.5*${l0} # SPH kernel diameter
variable        c0 equal 10.0 # speed of sound for ulsph
variable        E equal 2.0e5 # Young's modulus for solid objects
variable        sigma_yield equal 0.05*${E} # plastic yield stress for solid objects
variable        contact_stiffness equal 0.5*${c0}^2*${rho_ulsph} # contact force amplitude
variable        skin equal ${h} # Verlet list range
variable        vol_one equal ${l0}^2 # initial particle volume for 2d simulation

units		si
dimension       2
boundary        sm sm p
atom_style      smd
comm_style      tiled
neighbor        ${skin} bin
neigh_modify    every 5 delay 0 check yes
comm_modify     vel yes
newton          off
atom_modify     map array

# create simulation box, a container, and a ulsph column
region          box block -5 5 -5 5 -0.01 0.01 units box
create_box      2 box
region          solid sphere 0 0 0 4.5 units box
region          gas sphere 0 0 0 3.5 units box
lattice         sq ${l0}
create_atoms    1 region solid
set             region gas type 2
group           tlsph type 1
group           ulsph type 2

# initialize particle properties
set             group all meso_rho ${rho_ulsph}
set             group all diameter ${h}
set             group all contact_radius ${l0}
set             group all volume  ${vol_one}
set             group all density ${rho_ulsph}
set             group tlsph density ${rho_obj}
set             group ulsph meso_e 100

# set pair styles
pair_style      hybrid/overlay ulsph tlsph *UPDATE_PAIRWISE 1.0 smd/hertz 1.0
pair_coeff      2 2 ulsph *COMMON ${rho_ulsph} ${c0} 0.1 1 &
		*EOS_PERFECT_GAS 1.4 &
	        *END
pair_coeff      1 1 tlsph *COMMON ${rho_obj} ${E} 0.3 0.5 0.0 10 1.0 &
                *LINEAR_PLASTICITY ${sigma_yield} &
		*FAILURE_MAX_PLASTIC_STRAIN 0.7 &
		*EOS_LINEAR &
                *END
pair_coeff      1 2 smd/hertz ${contact_stiffness}

compute         eint all smd/internal_energy
compute         alleint all reduce sum c_eint
compute         contact_radius all smd/contact_radius
compute         S tlsph smd/tlsph_stress
compute         nn ulsph smd/ulsph_num_neighs
compute         epl tlsph smd/plastic_strain
compute         hgerr tlsph smd/hourglass_error

variable        etot equal pe+ke+c_alleint # total energy of the system
fix             dtfix all smd/adjust_dt 0.1 # compute stable time increment
fix             integration_fix_ulsph ulsph smd/integrate_ulsph adjust_radius 1.2
fix             integration_fix_tlsph tlsph smd/integrate_tlsph xsph
fix             balance_fix all balance 1000 0.9 rcb # load balancing for MPI

thermo          100
thermo_style    custom step ke pe v_etot c_alleint f_dtfix dt
thermo_modify   lost ignore
dump            dump_id all custom 100 dump.LAMMPS id type x y &
                fx fy vx vy c_eint c_contact_radius mol &
                c_S[1] c_S[2] c_S[4] mass radius c_epl c_hgerr
dump_modify     dump_id first yes

run             10000
#>>========>>========>>========>>========>>========>>========>>========>>========
